# Лабораторная работа ¹ 1
# Атака сомолетом наземной цели
# (тема "Моделирование случайных событий")
# Постановка задачи
# Оценить  вероятность  выполнения  боевой задачи истребителем, вооруженным
# mr ракетами класса воздух - земля, в условиях противодействия цели.
# Исследовать зависимость вероятность  выполнения  боевой задачи от одного из параметров задачи по указанию руководителя.
# Модель
# Истребитель летит на малой высоте. Приблизившись к цели на расстояние L, истребитель запускает ракеты с интервалом D. Средняя скорость полета ракеты, вероятность попадания ракеты в цель и вероятность успешного противодействия  цели аппроксимированы линейными зависимостями в функции расстояния от истребителя до цели.
# Указание
# Сохраняйте значения варьируемого параметра и полученные
# результаты в специальных массивах.
# Результаты исследования оформите в виде графиков.
# Исходные данные
a := 0.9
b := 0.5  # Параметры аппроксимации вероятности попадания ракеты в цель
c := 0.9
d := 0.5  # То же вероятности противодействия
V0 := 400
v := 200  # Скорость полета самолета
L := 10000
mr := 4
Δ := 5  # Дистанция пуска, число ракет, интервал пуска
n := 10000  # Число прогонов модели
# Задание функций:
Pa(l) :=
    a - b*l/L if l ≤ L
    0 otherwise
# Вероятность попадания ракеты в цель;
# l - текущее расстояние между истребителем
# и целью.
Pp(l) :=
    c - d*l/L if l ≤ L
    0 otherwise  # Вероятность успеха при противодействии
V(l) :=
    V0 - v*l/L if l ≤ L
    0 otherwise  # Средняя скорость полета ракеты
# Жеребьевка результатов пусков ракет. Подсчет числа побед истребитель:  M0 - число побед в серии из n атак;
# M1 - общее число ракет,израсходованных в удачных атаках.
M :=
    k ← [0; 0]
    for i ∈ 1 .. n
        l ← L
        for j ∈ 1 .. mr
            victory ← 0
            m ← 0
            t ← Δ*j
            l ← L - V0*t
            if rnd(1) > Pp(l) and rnd(1) < Pa(l)
                m ← m + j
                victory ← 1
                k[1] ← k[1] + m
                break
        k[0] ← k[0] + victory
    k
# k0 - счетчик числа удачных атак
# k1 - счетчик числа израсходованных ракет
# Цикл из n прогонов модели атаки
# Цикл из mr прогонов модели атаки
# Момент пуска очередной ракеты
# Расстояние до цели
# Если true, то атака удачна
# Число израсходоанных ракет в  атаке
# Код победы
# Выход из цикла по j
# Число удачных атак истребителя
# Выходной параметр
# Число удачных атак M0 и количество израсходованнвх во всех удачных атаках ракет M1.
M = [6196; 12481]
p := M[0]/n
p = 0.6196
σ := sqrt(p*(1 - p)/n)
σ = 0.00485485
# Здесь определите частоту побед истребителя и среднюю квадратическую погрешность частоты
α := 0.05
t := qnorm(1 - α/2, 0, 1)
t = 1.95996  # Уровень значимости и соответствующая квантиль нормального распределения
p1 := p - t*σ
p2 := p + t*σ
p1 = 0.610085
p2 = 0.629115  # Границы доверительного интервала
M[1]/M[0] = 2.01436
# Среднее число ракет, израсходованных
# в одной удачной атаке
(mr*(n - M[0]) + M[1])/n = 2.7697
# Среднее число ракет, израсходованных
# во всех атаках
P(n) :=
    victory ← 0
    for i ∈ 1 .. n
        l ← L
        for j ∈ 1 .. mr
            t ← Δ*j
            l ← L - V0*t
            if rnd(1) > Pp(l) and rnd(1) < Pa(l)
                victory ← victory + 1
                break
        k[i] ← victory/i
    k
# .
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Q := P(1000)
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# Здесь организуйте накопление результатов моделирования,
# постройте соответствующие графики и сформулируйте выводы, например,
# 1. Влияние исследуемого фактора на вероятность победы -
# 2. Влияние исследуемого фактора на расход ракет -
# 3. Точность результата -
# 4.  . . .
# Подпись, дата.
