# Лабораторная работа ¹ 2
# (тема - моделирование независимых случайных величин)
# Гарантированная дальность полета баллистической ракеты
# Постановка задачи: Исследование зависимости гарантированной дальности полета от
# переменной, указанной руководителем.
# Исходные данные:
Mok := 200
σok := 2  # Математические ожидания и средние квадратические погрешности массы окислителя.
Mg := 100
σg := 0.5  # То же массы горючего.
MR := 3
σR := 0.03  # То же расхода топлива.
Mkm := 2
σkm := 0.02  # То же соотношения между расходами окислителя и горючего.
Mkn := 100
σkn := 0.01  # То же массы конструкции ракеты.
Mud := 3000
σud := 0.01  # То же удельного импульса тяги.
A := 2*10^-8  # Эмпирическая константа в формуле для дальности полета
# Метод решения.
# Генератор нормально распределенных случайных величин (задание функции).
# Допускается замена генератора встроенной функцией Mathcad'а rnorm.
Norm(M, σ) := M + σ*(sum(rnd(1), i = 0 .. 11) - 6)
n := 500
i := 0 .. n - 1
# Жеребьевка заправочных масс, расходов топливных компонентов, относительного запаса топлива m и массы конструкции ракеты.
μ :=
    for i ∈ 0 .. n - 1
        Wok ← Norm(Mok, σok)
        Wg ← Norm(Mg, σg)
        Rt ← Norm(MR, σR)
        Km ← Norm(Mkm, σkm)
        Rg ← Rt/(Km + 1)
        Rok ← Rg*Km
        Tg ← Wg/Rg
        Tok ← Wok/Rok
        T ← if(Tok < Tg, Tok, Tg)
        Mt ← (Rok + Rg)*T
        Mkn ← Norm(Mkn, σkn)
        mu[i] ← Mt/(Mt + Mkn)
    mu  # Масса окислителя
# Масса горючего
# Расход топлива
# Соотношение расходов
# Расход горючего
# Расход окислителя
# Продолжительность работы ЖРД
# Рабочий запас таплива
# Масса конструкции
# Относительный запас топлива
Iud[i] := Norm(Mud, σud)
V[i] := -0.8*Iud[i]*ln(1 - μ[i])  # Массив скоростей в конце активного участка полета.
L[i] := A*V[i]^3  # Массив дальностей полета ракеты.
Iud[11] = 2999.99
Lsr := mean(L)
s := sqrt(sum((L[i - 1] - Lsr)^2, i = 1 .. n)/(n - 1))
Lsr = 727.094
s = 9.52625
# Гистограмма и плотность нормального распределения
# 1.Определение границ диапазона дальностей
Lmax := max(L)
Lmin := min(L)
Lmax = 753.251
Lmin = 690.386
# 2.Назначение числа интервалов
k := 12
# Границы интервалов
Δl := (Lmax - Lmin)/k
ll :=
    for j ∈ 0 .. k + 1
        ll[j] ← Lmin + j*Δl
    ll
# 3.Определение массива ординат гистограммы
H := hist(ll, L)
p := H/n
# 4.Перестроение массива дальностей L в вариационный ряд дальностей
L := sort(L)
# 5.Определение лплотности распределения вероятностей
f := dnorm(L, Lsr, s)
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α := 0.05
t := qnorm(α/2, 0, 1)
t = -1.95996  # Квантиль нормального распределения
Lgar := Lsr + t*s
Lgar = 708.423  # Гарантированная дальность
# Эмпирическая функция распределения
F[i] := i/n  # Функция распределения
α := 0.05  # Уровень значимости
dα := 1.36*(sqrt(n) + 0.12 + 0.11/sqrt(n))^-1
dα = 0.0604832
F_l := F - dα
F_p := F + dα  # Границы доверительной области
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