# Лабораторная работа ¹ 4
# Вычисление определенного интеграла методом Монте - Карло
# Задание: вычислить интеграл при a = 0.5, b=1.6. (Вариант ¹ 36)
ϕ(x) := 1/(1 + x^2)^0.2
p(x, a) := ln(x/a)/x
J(x, a, b) := integral(ϕ(x)*p(x, a), x = a .. b)
# Задание
# функций
a := 0.5
b := 1.6
# Вычисление интеграла заполнением прямоугольника равномерно
# распределенными точками
N := 1000
i := 0 .. N - 1
d := (b - a)/(N - 1)
x[i] := a + d*i
Z[i] := 1/(1 + x[i]^2)^0.2*ln(x[i]/a)/x[i]
C := max(Z)
C = 0.612076
r1[i] := rnd(1)
r2[i] := rnd(1)
ξ1 := a + (b - a)*r1
ξ2 := C*r2
# Геометрическая интерпретация интеграла
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M :=
    n ← 0
    for i ∈ 0 .. N - 1
        continue if ξ2[i] > Z[i]
        n ← n + 1
    n
I := C*(b - a)*M/N
I = 0.570271
# Построение доверительного интервала с доверительной вероятностью 0.95
v := Z - I
s := sqrt(sum(v[i - 1]^2, i = 1 .. N)/(N - 1))
s = 0.145717
β := 0.975
t := qnorm(β, 0, 1)
Il := I - t*s/sqrt(N)
Ip := I + t*s/sqrt(N)
Il = 0.56124
Ip = 0.579303
# Контроль: вычисление интеграла при помощи встроенного оператора  Mathcad'а
I := J(x, a, b)
I = 0.575563
# Выводы... | Подпись, дата.
