# Лабораторная работа ¹ 5
# (тема "Моделирование случайных векторов)
# Несущая способность детали
# Исходные данные:
# Деталь - шар-баллон;
# Нагрузка - внутреннее давление;
# Расчетная формула: p = 2sb*t/R.
# Временное сопротивление: M(sb) = 63.8e7; D(sb) = 6.8e14.
# Толщина стенки:  M(t) = 3.15e-3; D(t) = 0.0085e-6.
# Радиус баллона  R = 0.2.
n := 2
i := 0 .. n - 1
M := [6.38*10^8; 3.15*10^-3]  # Вектор математического ожидания и ковариационная матрица
K[0, 0] := 6.8*10^14
K[1, 1] := 0.0085*10^-6
K[0, 1] := -0.2*sqrt(6.8*10^14*0.0085*10^-6)
K[1, 0] := K[0, 1]
K = [680000000000000, -480.833; -480.833, 8.5e-9]
R := 0.2
# Каноническое разложение случайного вектора,
# по собственным векторам ковариационной матрицы
D := eigenvals(K)
transpose(D) = [8.16e-9, 680000000000000]  # Собственные значения матрицы К
σ[i] := sqrt(D[i])  # Ср. квадратичные отклонения
F := eigenvecs(K)
F = [-7.07107e-13, -1; -1, 7.07107e-13]  # Матрица собственных векторов
Z0 := F[:, 0]
Z1 := F[:, 1]  # Собственные векторы матрицы K
# Моделирование N реализаций несущей способности
N := 300
j := 0 .. N - 1
# Задание функции - генератора нормального распределения.
# Коэффициенты разложения
v(σ) := σ*(-6 + sum(rnd(1), l = 0 .. 11))
[sig[j]; t[j]] := M + v(σ[0])*Z0 + v(σ[1])*Z1  # Кононическое разложение случайного вектора
p[j] := 2*sig[j]*t[j]/R
# Несущая способность шара -
# баллона
# Статистическая обработка результатов моделирования
# Средние арифметическое,
# ср. квадратическое отклонение,
# ср. кв. погрешность ср. арифмет.
Psr := sum(p)/N
s := sqrt(sum((p[j] - Psr)^2, j = 0 .. N - 1)/(N - 1))
S := s/sqrt(N)
p := sort(p)  # Вариационный ряд
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# Эмпирическая функция распределения. Сравнение с номальным законом
α := 0.05
t := qnorm(1 - α, 0, 1)
t = 1.64485
# Уровень значимости.
# Квантиль нормального распределения
Pns := Psr - t*s
Pns = 18557942  # Несущая способность
# Выводы... | Подпись, дата
