# Лабораторная работа ¹ 6
# Вычисление определенного интеграла методом Монте - Карло
# Задание: вычислить интеграл при a = 0.5, b=1.6. (Вариант ¹ 36)
ϕ(x) := 1/(1 + x^2)^0.2
p(x, a) := ln(x/a)/x
J(x, a, b) := integral(ϕ(x)*p(x, a), x = a .. b)
# Задание
# функций
a := 0.5
b := 1.6
# Сведение задачи к вычислению математического ожидания
c := integral(ln(x/a)/x, x = a .. b)
c = 0.67646  # Нормирующий множитель
f(x) := ln(x/a)/(c*x)
# Плотность распределения случайной величины x
# (a < x < b)
# Функция распределения x (определена по
# таблицам интегралов)
F(x) := ln(x/a)^2/(2*c)
# Функция распределения x определена
# при помощи символьного интегрирования.
integral(ln(x/A)/(C*x), x) simplify → ln(x/A)^2/(2*C)
N := 1000
i := 0 .. N - 1
R[i] := rnd(1)  # R - реализации базовой случайной величины
ξ := a*exp(sqrt(2*c*R))
# Реализации случайной величины, распределенной по закону f(x). Использована
# функция, обратная F(x).
η := 1/(1 + ξ^2)^0.2  # Реализации подинтегральной функции
I := c*sum(η)/N
I = 0.575991  # Оценка значения интеграла
# Доверительный интервал с доверительной вероятностью 0.95
v := η - I
s := sqrt(sum(v[i - 1]^2, i = 1 .. N)/(N - 1))
s = 0.279743
β := 0.975
t := qnorm(β, 0, 1)
Il := I - t*s/sqrt(N)
Ip := I + t*s/sqrt(N)
Il = 0.558652
Ip = 0.593329
# Вычисление интеграла заполнением прямоугольника равномерно
# распределенными точками
N := 1000
i := 0 .. N - 1
d := (b - a)/(N - 1)
x[i] := a + d*i
Z[i] := 1/(1 + x[i]^2)^0.2*ln(x[i]/a)/x[i]
C := max(Z)
C = 0.612076
r1[i] := rnd(1)
r2[i] := rnd(1)
ξ1 := a + (b - a)*r1
ξ2 := C*r2
# Геометрическая интерпретация интеграла
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M :=
    n ← 0
    for i ∈ 0 .. N - 1
        continue if ξ2[i] > Z[i]
        n ← n + 1
    n
I := C*(b - a)*M/N
I = 0.576331
# Построение доверительного интервала с доверительной вероятностью 0.95
v := Z - I
s := sqrt(sum(v[i - 1]^2, i = 1 .. N)/(N - 1))
s = 0.147796
β := 0.975
t := qnorm(β, 0, 1)
Il := I - t*s/sqrt(N)
Ip := I + t*s/sqrt(N)
Il = 0.56717
Ip = 0.585491
# Контроль: вычисление интеграла при помощи встроенного оператора  Mathcad'а
I := J(x, a, b)
I = 0.575563
# Выводы... | Подпись, дата.
