# Лабораторная работа ¹ 7
# (тема "Моделирование случайного процесса)
# Постановка задачи. Построить каноническое разложение для профиля грунтовой дороги,
# заданного корреляционной функцией с параметрами D, tk, a, b
# Исходные данные:
# Параметры корреляционной функции.
# Указание: Значение tk подбирается по графику корреляционной функции.
τk := 5
D := 1
α := 1
β := 1
K(D, α, τ, τk) := if(|τ| < τk, D*exp(-α*|τ|), 0)  # Корреляционная функция
N := 100
i := 0 .. N - 1
τ[i] := -4*τk + 8*τk*i/N
Y[i] := K(D, α, τ[i], τk)  # Массив значений корреляционной функции
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# График корреляционной функции
# Спектральный анализ корреляционной функции
M := 25
k := 0 .. M - 1
# Коэффициентыкосинус-рядаФурье.
# Указание: Значение М подберите  так, чтобы A_M  приближенно равнялось 0.
A[k] := 2/τk*integral(K(D, α, t, τk)*cos(π/τk*k*t), t = 0 .. τk)
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# Спектральный синтез корреляционной функции
F(t) := A[0]/2 + sum(A[k]*cos(π/τk*k*t), k = 1 .. M - 1)  # Обратное преобразование Фурье
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# Сравнение исходной и преобразованной корреляционной функции.
# Каноническое разложение случайного процесса
σ := sqrt(vectorize(A))
v[k] := |rnorm(1, 0, σ[k])|  # Нормально распределенные коэффициенты разложения.
i := 0 .. 2*N - 1
t[i] := -τk + 2*τk/N*i
ω[k] := π/τk*k
y[i] := sum(v[k]*cos(ω[k]*t[i]) + v[k]*sin(ω[k]*t[i]), k)  # Каноническое разложение.
# Графики реализаций дорожного профиля. (Два периода)
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Ysr := mean(y)
Ysr = 0.276693  # Оценка математического ожидания
Ds := sum(σ[k]^2, k)
Ds = 1.15735  # Оценка дисперсии
# Сглаживание реализации процесса при помощи кубического сплайна
X := t
Z := Re(y)  # Сеточные значения аргумента и функции
S := cspline(X, Z)  # Массив вторых производных в узлах сетки
Spl(x) := interp(S, X, Z, x)  # Сплайн
# Новая сетка. Указание: Исследуйте
# влиение числа узлов n на качество аппроксимации.
n := 51
j := 0 .. n - 1
x[j] := min(t) + ((max(t) - min(t))/n)*j
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# Сравнение сплайна с исходной реализацией
# Выводы, подпись, дата.
